OpenVSP model (file version 5), 3 components.
Geometry view with OpenVSP parameter names; values to 6 digits, angles in degrees, lengths in the model's unit.
Overall bounding box: X_Min=0 X_Len=540 Y_Min=-429.499 Y_Len=858.999 Z_Min=-57 Z_Len=189.785

Fuselage "Fuselage"
  location (X Y Z) 0 0 0, rotation 0 0 0
  bounding box size 540 90 100.158
  Design: Length=540
  cross sections:
    n  XLocPercent  YLocPercent  ZLocPercent  shape
    0  0            0            -0.012963    circle Circle_Diameter=15
    1  0.206551     0            -0.012963    rounded rectangle RoundRectXSec_Radius=20 RoundedRect_Height=100 RoundedRect_Width=90
    2  0.671196     0            0.0148148    rounded rectangle RoundRectXSec_Radius=20 RoundedRect_Height=70 RoundedRect_Width=70
    3  1            0            0.0537037    circle Circle_Diameter=28

Wing "Wing"
  location (X Y Z) 175 0 40, rotation 0 0 0
  symmetric about XZ
  bounding box size 185.497 858.999 18.8249
  totals: TotalSpan=858.999 TotalProjectedSpan=858.999 TotalChord=159.265 TotalArea=148076 TotalAR=4.98311 MAC=177.249
  root: chord 185.196, twist 0, airfoil file "TL54"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 BaseThickChord=0.10026 ThickChord=0.10026
  sections:
    n  Span     Root_Chord  Tip_Chord  Area     Sweep  Sweep_Location  Dihedral  Twist  Twist_Location  tip airfoil
    1  215.999  185.196     185.196    40002.3  0      1               0         0      0.25            as above
    2  160      185.196     160        27615.7  0      1               0         0      0.25            as above
    3  53.5002  160         80         6420.02  15     0.6             0         0      0.25            as above

Wing "Tail"
  location (X Y Z) 425 10 35, rotation 45 0 0
  symmetric about XZ
  bounding box size 102.534 215.57 101.412
  totals: TotalSpan=250 TotalProjectedSpan=250 TotalChord=79.7858 TotalArea=19946.4 TotalAR=3.13339 MAC=81.9477
  root: chord 102.534, twist 0, NACA 4-series Camber=0 CamberLoc=0.2 ThickChord=0.1
  sections:
    n  Span  Root_Chord  Tip_Chord  Area     Sweep  Sweep_Location  Dihedral  Twist  Twist_Location  tip airfoil
    1  125   102.534     57.0377    9973.22  20     0               0         0      0.25            as above
